# OpenSim document version 30000
IKTaskSet tasks_pose_matching:
  IKCoordinateTask [values shared by the 9 below unless stated]: apply=true value_type=default_value value=0
  IKCoordinateTask pelvis_obliquity: weight=0.1
  IKCoordinateTask pelvis_tilt: weight=0.1
  IKCoordinateTask subtalar_angle_r: weight=0.001
  IKCoordinateTask subtalar_angle_l: weight=0.001
  IKCoordinateTask mtp_angle_r: weight=1
  IKCoordinateTask mtp_angle_l: weight=1
  IKCoordinateTask lumbar_extension: weight=1
  IKCoordinateTask lumbar_bending: weight=1
  IKCoordinateTask lumbar_rotation: weight=1
